Γ(3) = 2
# dgamma - это плотность вероятности Гамма распределения
wL(x, nu) := x^(nu - 1)*exp(-x)/Γ(nu)
wLs(x, nu) := dgamma(x, nu)
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integral(wL(x, 3), x = 0 .. ∞) = 1
integral(wLs(x, 3), x = 0 .. ∞) = 1
F(x, nu) := integral(wL(t, nu), t = 0 .. x)
# pgamma - это функция распределения Гамма
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α(h, nu) := 1 - pgamma(h, nu)
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# Вероятность ложной тревоги
hx := 1
hh(p, nu) := root(α(hx, nu) - p, hx)
hh(0.01, 1) = 4.60517
hh(0.01, 2) = 6.63835
hh(0.01, 3) = 8.40595
Pc(x) := sin(4*π*x)/(4*π*x)
Ps(x) := (1 - cos(4*π*x))/(4*π*x)
g2(x) := 1 - Pc(x)^2 - Ps(x)^2
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Ac(x, f0) := (1 + Pc(x))*cos(f0) + Ps(x)*sin(f0)
As(x, f0) := (1 - Pc(x))*sin(f0) + Ps(x)*cos(f0)
V(x, f0) := (g2(x)*Ac(x, f0)^2 + ((1 + Pc(x))*As(x, f0) - Ps(x)*Ac(x, f0))^2)/(g2(x)*(1 + Pc(x)))
V(x, f0) → -(((sin(f0)*(sin(4*π*x)/(4*π*x) - 1) + cos(f0)*(cos(4*π*x) - 1)/(4*π*x))*(sin(4*π*x)/(4*π*x) + 1) - (cos(f0)*(sin(4*π*x)/(4*π*x) + 1) - sin(f0)*(cos(4*π*x) - 1)/(4*π*x))*(cos(4*π*x) - 1)/(4*π*x))^2 - (cos(f0)*(sin(4*π*x)/(4*π*x) + 1) - sin(f0)*(cos(4*π*x) - 1)/(4*π*x))^2*((cos(4*π*x) - 1)^2/(16*π^2*x^2) + sin(4*π*x)^2/(16*π^2*x^2) - 1))/((sin(4*π*x)/(4*π*x) + 1)*((cos(4*π*x) - 1)^2/(16*π^2*x^2) + sin(4*π*x)^2/(16*π^2*x^2) - 1))
V(x, 0) → sin(4*π*x)/(4*π*x) + 1
V(x, π/2) → -(((sin(4*π*x)/(4*π*x) - 1)*(sin(4*π*x)/(4*π*x) + 1) + (cos(4*π*x) - 1)^2/(16*π^2*x^2))^2 - (cos(4*π*x) - 1)^2*((cos(4*π*x) - 1)^2/(16*π^2*x^2) + sin(4*π*x)^2/(16*π^2*x^2) - 1)/(16*π^2*x^2))/((sin(4*π*x)/(4*π*x) + 1)*((cos(4*π*x) - 1)^2/(16*π^2*x^2) + sin(4*π*x)^2/(16*π^2*x^2) - 1)) simplify → 1 - sin(4*π*x)/(4*π*x)
W1(x, κ, z, f0) := if(x > 0, exp(-z^2*V(κ, f0)/2)*exp(-x)*I0(z*sqrt(2*x*V(κ, f0))), 0)
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integral(W1(x, 10, 5, 0), x = 0 .. ∞) = 1
F1(x, κ, z, f0) := integral(W1(t, κ, z, f0), t = 0 .. x)
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β1(h, z, κ, f0) := F1(h, κ, z, f0)
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j := sqrt(-1)
β(h, z, ν) := exp(-z^2*V(10, 0)/2)*1/π*integral(integral(integral(exp(j*t*ν/(1 - t)*x - ν*x)*1/(1 - t)^2*cos(L*t/(1 - t))*I0(z*sqrt(2*x*V(10, 0)))^ν, x = 0 .. 100), t = 0 .. 1), L = 0 .. h)
β(2, 2, 1) =  # no stored result; disabled
W2(x, κ, z, f0) := integral(W1(m, κ, z, f0)*W1(x - m, κ, z, f0), m = 0 .. ∞)
a := 0
k := 0 .. 100
b := 70
t[k] := a + (b - a)/100*k
W2(25, 100, 5, 0) = 0.0559932
integral(W2(x, 1, 5, 0), x = 0 .. 1000) = 1.00059
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F2(x, κ, z, f0) := integral(W2(t, κ, z, f0), t = 0 .. x)
β2(h, z, κ, f0) := F2(h, κ, z, f0)
kk := 1 .. 10
zz[kk] := kk
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beta[kk] := 0
ν := 1
y := rnorm(ν, 0, 1)
x := rnorm(ν, 0, 1)
x = [-0.679406]
x[0] = -0.679406
L(□) := sum((((1 - Pc(x))*(z*((1 + Pc(x))*cos(f0) + Ps(x)*sin(f0))*γ0 + sqrt(1 + Pc(x))*x[n])^2 + (1 + Pc(x))*(z*((1 - Pc(x))*sin(f0) + Ps(x)*cos(f0))*γ0 + sqrt(1 - Pc(x))*y[n])^2) - 2*(z*((1 - Pc(x))*sin(f0) + Ps(x)*cos(f0))*γ0 + sqrt(1 - Pc(x))*y[n])*(z*((1 + Pc(x))*cos(f0) + Ps(x)*sin(f0))*γ0 + sqrt(1 + Pc(x))*x[n]))/(2*(1 - Pc(x)^2 - Ps(x)^2)), n = 0 .. ν - 1)  # error: This placeholder is empty.
V := 10000
beta :=
    for kk ∈ 0 .. 10
        bt[kk] ← 0
    for v ∈ 1 .. V
        xx ← rnorm(ν, 0, 1)/sqrt(2)
        yy ← rnorm(ν, 0, 1)/sqrt(2)
        f0 ← 0
        γ0 ← 1
        x ← 10
        hhh ← hh(0.001, ν)
        for kk ∈ 0 .. 10
            temp ← 0
            for nn ∈ 0 .. ν - 1
                temp ← temp + (((1 - Pc(x))*(kk*((1 + Pc(x))*cos(f0) + Ps(x)*sin(f0))*γ0 + sqrt(1 + Pc(x))*xx[nn])^2 + (1 + Pc(x))*(kk*((1 - Pc(x))*sin(f0) + Ps(x)*cos(f0))*γ0 + sqrt(1 - Pc(x))*yy[nn])^2) - 2*(kk*((1 - Pc(x))*sin(f0) + Ps(x)*cos(f0))*γ0 + sqrt(1 - Pc(x))*yy[nn])*(kk*((1 + Pc(x))*cos(f0) + Ps(x)*sin(f0))*γ0 + sqrt(1 + Pc(x))*xx[nn]))/(2*(1 - Pc(x)^2 - Ps(x)^2))
            L[kk] ← temp
            bt[kk] ← bt[kk] + 1 if L[kk] < hhh
    bt/V
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beta = [0.9999; 0.9967; 0.9603; 0.7676; 0.3879; 0.0968; 0.0112; 0.0005; 0; 0; 0]
